import Sofa.Core

# Required import for python
import Sofa


# Choose in your script to activate or not the GUI
USE_GUI = True


def main():
    # Call the SOFA function to create the root node
    root = Sofa.Core.Node("root")

    # Call the createScene function, as runSofa does
    createScene(root)

    # Once defined, initialization of the scene graph
    Sofa.Simulation.init(root)

    # Launch the GUI (qt or qglviewer)
    Sofa.Gui.GUIManager.Init("myscene", "qglviewer")
    Sofa.Gui.GUIManager.createGUI(root, __file__)
    Sofa.Gui.GUIManager.SetDimension(1080, 800)

    # Initialization of the scene will be done here
    Sofa.Gui.GUIManager.MainLoop(root)
    Sofa.Gui.GUIManager.closeGUI()


# Function used only if this script is called from a python environment
if __name__ == '__main__':
    main()

def createScene(rootNode):
        rootNode.addObject("VisualGrid", nbSubdiv=10, size=1000)

        confignode = rootNode.addChild("Config")
        confignode.addObject('OglSceneFrame', style="Arrows", alignment="TopRight")

        #applies defult gravity force and the timestep
        rootNode.gravity=[0.0,-9.81,0.0]
        rootNode.dt=0.01

        #applies mechanical model so that all furure elements will have the same mass, volume and inertia matrix.
        totalMass = 1.0
        volume = 1.0
        inertiaMatrix=[1., 0., 0., 0., 1., 0., 0., 0., 1.]

        # Collision pipeline
        rootNode.addObject('DefaultPipeline')
        rootNode.addObject('FreeMotionAnimationLoop')
        rootNode.addObject('GenericConstraintSolver', tolerance="1e-6", maxIterations="1000")
        rootNode.addObject('BruteForceBroadPhase')
        rootNode.addObject('BVHNarrowPhase')
        rootNode.addObject('RuleBasedContactManager', responseParams="mu="+str(0.0), name='Response', response='FrictionContactConstraint')
        rootNode.addObject('LocalMinDistance', alarmDistance=10, contactDistance=5, angleCone=0.01)


        # Creating the falling sphere object
        sphere = rootNode.addChild("sphere")
        sphere.addObject('EulerImplicitSolver', name='odesolver')
        sphere.addObject('CGLinearSolver', name='Solver', iterations=25, tolerance=1e-05, threshold=1e-05)
        sphere.addObject('MechanicalObject', name="mstate", template="Rigid3", translation2=[0., 0., 0.], rotation2=[0., 0., 0.], showObjectScale=50)
        sphere.addObject('UniformMass', name="mass", vertexMass=[totalMass, volume, inertiaMatrix[:]])
        sphere.addObject('UncoupledConstraintCorrection')

        #### Collision subnode for the sphere
        collision = sphere.addChild('collision')
        collision.addObject('MeshOBJLoader', name="loader", filename="mesh/ball.obj", triangulate="true", scale=45.0)
        collision.addObject('MeshTopology', src="@loader")
        collision.addObject('MechanicalObject')
        collision.addObject('TriangleCollisionModel')
        collision.addObject('LineCollisionModel')
        collision.addObject('PointCollisionModel')
        collision.addObject('RigidMapping')

        #### Visualization subnode for the sphere
        sphereVisu = sphere.addChild("VisualModel")
        sphereVisu.loader = sphereVisu.addObject('MeshOBJLoader', name="loader", filename="mesh/ball.obj")
        sphereVisu.addObject('OglModel', name="model", src="@loader", scale3d=[50]*3, color=[0., 1., 0.], updateNormals=False)
        sphereVisu.addObject('RigidMapping')

        # Creating the floor object
        floor = rootNode.addChild("floor")
        floor.addObject('MechanicalObject', name="mstate", template="Rigid3", translation2=[0.0,-300.0,0.0], rotation2=[0., 0., 0.], showObjectScale=5.0)
        floor.addObject('UniformMass', name="mass", vertexMass=[totalMass, volume, inertiaMatrix[:]])

        #### Collision subnode for the floor
        floorCollis = floor.addChild('collision')
        floorCollis.addObject('MeshOBJLoader', name="loader", filename="mesh/floor.obj", triangulate="true", scale=5.0)
        floorCollis.addObject('MeshTopology', src="@loader")
        floorCollis.addObject('MechanicalObject')
        floorCollis.addObject('TriangleCollisionModel', moving=False, simulated=False)
        floorCollis.addObject('LineCollisionModel', moving=False, simulated=False)
        floorCollis.addObject('PointCollisionModel', moving=False, simulated=False)
        floorCollis.addObject('RigidMapping')

        #### Visualization subnode for the floor
        floorVisu = floor.addChild("VisualModel")
        floorVisu.loader = floorVisu.addObject('MeshOBJLoader', name="loader", filename="mesh/floor.obj")
        floorVisu.addObject('OglModel', name="model", src="@loader", scale3d=[5.0]*3, color=[1., 1., 0.], updateNormals=False)
        floorVisu.addObject('RigidMapping')


        return rootNode

if __name__ == '__main__':
    main()
