<!-- Inital setup of the first object -->

<?xml version="1.0"?>
<Node name="root" gravity="0 0 -9.81" dt="0.01" bbox="-1 -1 -1 1 1 1">
    <RequiredPlugin name="Sofa.Component.Mass"/>
    <RequiredPlugin name="Sofa.Component.StateContainer"/>
    <RequiredPlugin name="Sofa.Component.Visual"/>
    <VisualStyle displayFlags="showBehaviour"/>
    <DefaultAnimationLoop/>
    <Node name="Object1"/>
        <MechanicalObject template="Vec3d" name="Particles" position="0 0 0" showObject="1" showObjectScale="10"/>
        <UniformMass template="Vec3d" name="Mass"/>
    </Node>
</Node>
